p := 100958
p0 := 101325
a := 5.255
alt(a) := 44330*(1 - (p/p0)^(1/a))
alt(5.255) = 30.5994
44330*(1 - (p/p0)^(1/a)) = 30.5994
x^a series, x, 5 → x^(1051/200)
sin(x) series, x, 5 → x - x^3/6 + x^5/120
44330*(1 - (p/p0)^(8/42)) = 30.6285
a*8 = 42.04
